# OpenSim document version 40500
ScaleTool 3DGaitModel2392-scaled:
  mass: 21
  height: -1
  age: -1
  GenericModelMaker:
    model_file: E:/Repo/afo_project/resources/osim_files/markerset.osim
  ModelScaler:
    apply: true
    scaling_order: measurements
    marker_file: ella/static_01_addedHJ.trc
    time_range: 0 8.44
    preserve_mass_distribution: false
    MeasurementSet:
      Measurement torso: apply=true
        MarkerPair: markers=(RShoulder LShoulder)
        MarkerPair: markers=(LShoulder Sternum)
        MarkerPair: markers=(RShoulder Sternum)
        BodyScale torso: axes=(X Y Z)
      Measurement pelvis: apply=true
        MarkerPair: markers=(RASIS LASIS)
        MarkerPair: markers=(RPSIS LPSIS)
        BodyScale pelvis: axes=(X Y Z)
      Measurement r_foot : apply=true
        MarkerPair: markers=(RToe RHeel)
        MarkerPair: markers=(RMT2 RMT5)
        BodyScale talus_r: axes=(X Y Z)
        BodyScale calcn_r: axes=(X Y Z)
        BodyScale toes_r: axes=(X Y Z)
      Measurement r_high: apply=true
        MarkerPair: markers=(RHJC RKneeMedial)
        BodyScale femur_r: axes=(X Y Z)
      Measurement r_shank: apply=true
        MarkerPair: markers=(RAnkleLateral RKneeLateral)
        MarkerPair: markers=(RAnkleMedial RKneeMedial)
        BodyScale tibia_r: axes=(X Y Z)
      Measurement l_foot: apply=true
        MarkerPair: markers=(LToe LHeel)
        MarkerPair: markers=(LMT5 LMT2)
        BodyScale talus_l: axes=(X Y Z)
        BodyScale calcn_l: axes=(X Y Z)
        BodyScale toes_l: axes=(X Y Z)
      Measurement l_thigh: apply=true
        MarkerPair: markers=(LHJC LKneeMedial)
        BodyScale femur_l: axes=(X Y Z)
      Measurement l_shank: apply=true
        MarkerPair: markers=(LAnkleLateral LKneeLateral)
        MarkerPair: markers=(LAnkleMedial LKneeMedial)
        BodyScale tibia_l: axes=(X Y Z)
  MarkerPlacer:
    apply: false
    time_range: 0.005 5.73
    max_marker_movement: -1
    IKTaskSet:
      IKMarkerTask Sternum: apply=true weight=0
      IKMarkerTask RShoulder: apply=true weight=0
      IKMarkerTask LShoulder: apply=true weight=0
      IKMarkerTask RASIS: apply=true weight=0
      IKMarkerTask LASIS: apply=true weight=0
      IKMarkerTask RPSIS: apply=true weight=0
      IKMarkerTask RKneeLateral: apply=true weight=0
      IKMarkerTask RKneeMedial: apply=true weight=0
      IKMarkerTask RAnkleLateral: apply=true weight=0
      IKMarkerTask RAnkleMedial: apply=true weight=0
      IKMarkerTask RHeel: apply=true weight=0
      IKMarkerTask RMT2: apply=true weight=0
      IKMarkerTask RMT5: apply=true weight=10
      IKMarkerTask RToe: apply=true weight=10
      IKMarkerTask LKneeLateral: apply=true weight=0
      IKMarkerTask LKneeMedial: apply=true weight=0
      IKMarkerTask LAnkleLateral: apply=true weight=0
      IKMarkerTask LAnkleMedial: apply=true weight=0
      IKMarkerTask LHeel: apply=true weight=0
      IKMarkerTask LMT2: apply=true weight=0
      IKMarkerTask LMT5: apply=true weight=10
      IKMarkerTask LToe: apply=true weight=10
      IKMarkerTask LPSIS: apply=true weight=0
      IKMarkerTask RHJC: apply=false weight=20
      IKMarkerTask LHJC: apply=false weight=20
