# OpenSim document version 40500
ScaleTool 3DGaitModel2392-scaled:
  mass: 21
  height: -1
  age: -1
  GenericModelMaker:
    model_file: C:/Users/lgre690/PycharmProjects/AFOProject/resources/osim_files/markerset.osim
  ModelScaler:
    apply: true
    scaling_order: measurements
    marker_file: ella/static_01_addedHJ.trc
    time_range: 0 8.44
    preserve_mass_distribution: false
    MeasurementSet:
      Measurement torso: apply=true
        MarkerPair: markers=(RACR1 LACR1)
        MarkerPair: markers=(LACR1 T10)
        MarkerPair: markers=(RACR1 T10)
        BodyScale torso: axes=(X Y Z)
      Measurement pelvis: apply=true
        MarkerPair: markers=(RASI LASI)
        MarkerPair: markers=(RPSI LPSI)
        BodyScale pelvis: axes=(X Y Z)
      Measurement r_foot : apply=true
        MarkerPair: markers=(RToe RCAL)
        MarkerPair: markers=(RMT1 RMT5)
        BodyScale talus_r: axes=(X Y Z)
        BodyScale calcn_r: axes=(X Y Z)
        BodyScale toes_r: axes=(X Y Z)
      Measurement r_high: apply=true
        MarkerPair: markers=(RHJC RMFC)
        BodyScale femur_r: axes=(X Y Z)
      Measurement r_shank: apply=true
        MarkerPair: markers=(RLMAL RLFC)
        MarkerPair: markers=(RMMAL RMFC)
        BodyScale tibia_r: axes=(X Y Z)
      Measurement l_foot: apply=true
        MarkerPair: markers=(LToe LCAL)
        MarkerPair: markers=(LMT5 LMT1)
        BodyScale talus_l: axes=(X Y Z)
        BodyScale calcn_l: axes=(X Y Z)
        BodyScale toes_l: axes=(X Y Z)
      Measurement l_thigh: apply=true
        MarkerPair: markers=(LHJC LMFC)
        BodyScale femur_l: axes=(X Y Z)
      Measurement l_shank: apply=true
        MarkerPair: markers=(LLMAL LLFC)
        MarkerPair: markers=(LMMAL LMFC)
        BodyScale tibia_l: axes=(X Y Z)
  MarkerPlacer:
    apply: false
    time_range: 0.005 5.73
    max_marker_movement: -1
    IKTaskSet:
      IKMarkerTask Sternum: apply=true weight=0
      IKMarkerTask RShoulder: apply=true weight=0
      IKMarkerTask LShoulder: apply=true weight=0
      IKMarkerTask RASI: apply=true weight=0
      IKMarkerTask LASI: apply=true weight=0
      IKMarkerTask RPSI: apply=true weight=0
      IKMarkerTask RKneeLateral: apply=true weight=0
      IKMarkerTask RKneeMedial: apply=true weight=0
      IKMarkerTask RAnkleLateral: apply=true weight=0
      IKMarkerTask RAnkleMedial: apply=true weight=0
      IKMarkerTask RHeel: apply=true weight=0
      IKMarkerTask RMT1: apply=true weight=0
      IKMarkerTask RMT5: apply=true weight=10
      IKMarkerTask RToe: apply=true weight=10
      IKMarkerTask LKneeLateral: apply=true weight=0
      IKMarkerTask LKneeMedial: apply=true weight=0
      IKMarkerTask LAnkleLateral: apply=true weight=0
      IKMarkerTask LAnkleMedial: apply=true weight=0
      IKMarkerTask LHeel: apply=true weight=0
      IKMarkerTask LMT1: apply=true weight=0
      IKMarkerTask LMT5: apply=true weight=10
      IKMarkerTask LToe: apply=true weight=10
      IKMarkerTask LPSI: apply=true weight=0
      IKMarkerTask RHJC: apply=false weight=20
      IKMarkerTask LHJC: apply=false weight=20
